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/batch
! ANSYS input file written by Workbench version 15.0.7  Release
/assign,rstp,file,rst              ! Force Eigen analysis to write to file.rst because WB expects it
/solu
antype,,restart,,,perturbation
/title,unsaved_project--Linear Buckling (B5)
perturb,buckle,,CURRENT,ALLKEEP                    ! linear buckling analysis keeping loads from pre-stress analysis
solve, elform                                       ! Generate matrices needed for perturbation analysis
bucopt,lanb,1,,,Range
outres,erase
outres,all,none
outres,nsol,all
mxpand                    ! default expand in case of complex solution
! *********** WB SOLVE COMMAND ***********
! check interactive state
*get,ANSINTER_,active,,int
*if,ANSINTER_,ne,0,then
/eof
*endif
solve
/com *************** Write FE CONNECTORS *********
CEWRITE,file,ce,,INTE
fini
/post1
fini
