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/batch
! ANSYS input file written by Workbench version 15.0.7  Release
! File used for geometry attach: C:\Users\petr\AppData\Local\Temp\WB_PETER_petr_6416_2\unsaved_project_files\dp0\SYS\DM\SYS.agdb
/title,unsaved_project--Static Structural (A5)
/com,--- Data in consistent NMM units.
/units,MPA
/prep7
! Turn off shape checking because checks already performed inside WB mesher.
! See help system for more information.
SHPP,OFF,,NOWARN
etcon,set             ! allow ANSYS to choose best KEYOP's for 180x elements
/com,*********** Nodes for the whole assembly ***********
nblock,3
(1i9,3e20.9e3)
        1    1.160000000E+002    1.115390165E+002   -2.400000000E+002
        2    1.550910670E+002    9.271303415E+001   -2.400000000E+002
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-1
/com,*********** Elements for Body 1 "Solid" ***********
et,1,187
eblock,19,solid,,493
(19i9)
        1        1        1        1        0        0        0        0       10        0        1      130      149      184      161      908      974      912      910
      971      999
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-1
/com,*********** Elements for Body 2 "Solid" ***********
et,2,187
eblock,19,solid,,1765
(19i9)
        2        2        2        2        0        0        0        0       10        0      494     1594     1596     1598     1599     4527     4533     4528     4529
     4534     4537
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-1
/com,*********** Send User Defined Coordinate System(s) ***********
csys,0
toffst,273.15,  ! Temperature offset from absolute zero
/com,*********** Set Reference Temperature ***********
tref,22.
/com,*********** Send Materials ***********
MP,DENS,1,7.85e-09,	! tonne mm^-3
MP,ALPX,1,1.2e-05,	! C^-1
MP,C,1,434000000,	! mm^2 s^-2 C^-1
MP,KXX,1,60.5,	! tonne mm s^-3 C^-1
MP,RSVX,1,0.00017,	! ohm mm
MP,EX,1,200000,	! tonne s^-2 mm^-1
MP,NUXY,1,0.3,
MP,MURX,1,10000,

MP,DENS,2,7.85e-09,	! tonne mm^-3
MP,ALPX,2,1.2e-05,	! C^-1
MP,C,2,434000000,	! mm^2 s^-2 C^-1
MP,KXX,2,60.5,	! tonne mm s^-3 C^-1
MP,RSVX,2,0.00017,	! ohm mm
MP,EX,2,200000,	! tonne s^-2 mm^-1
MP,NUXY,2,0.3,
MP,MURX,2,10000,

!************************* Model Summary ********************
!Solid,	Structural Steel,	matid,	1
!Solid,	Structural Steel,	matid,	2
!************************* End Model Summary ********************
/com,*********** Create Contact "Contact Region" ***********
*set,tid,4
*set,cid,3
r,tid
r,cid
et,tid,170
et,cid,174
eblock,10,,,16
(15i9)
     2259        4        4        4        0        9       10        2        2      241      205        2      204
     2260        4        4        4        0        4       11        5        5      216      221        5      213
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-1
eblock,10,,,16
(15i9)
     2275        3        3        3        0        9       10        2        2      241      205        2      204
     2276        3        3        3        0        4       11        5        5      216      221        5      213
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-1
eblock,10,,,15
(15i9)
     2291        4        4        4        0       11       20       17       17      253      284       17      252
     2292        4        4        4        0       10       20       11       11      249      253       11      247
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-1
eblock,10,,,15
(15i9)
     2306        3        3        3        0       11       20       17       17      253      284       17      252
     2307        3        3        3        0       10       20       11       11      249      253       11      247
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-1
eblock,10,,,15
(15i9)
     2321        4        4        4        0       15       22       95       95      271      314       95      272
     2322        4        4        4        0       15       95       19       19      272      298       19      270
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-1
eblock,10,,,15
(15i9)
     2336        3        3        3        0       15       22       95       95      271      314       95      272
     2337        3        3        3        0       15       95       19       19      272      298       19      270
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-1
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eblock,10,,,12
(15i9)
     2463        4        3        4        0     1097     1106     1098     1098     1951     1957     1098     1950
     2464        4        3        4        0     1096     1101     1102     1102     1945     1970     1102     1946
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-1
esel,s,type,,3
cm,_AllContacts,elem
keyo,cid,8,2               ! auto create asymmetric contact (from Program Controlled setting)
keyo,cid,10,2              ! adjust contact stiffness each NR iteration (from Program Controlled setting)
keyo,cid,12,5              ! bonded always
keyo,cid,2,2               ! MPC contact.  Valid only for bonded or no separation.  Requires nodal detection
keyo,cid,4,2               ! on nodal point - normal to target surface (from Program Controlled setting)
keyo,cid,9,1               ! ignore initial gaps/penetration
keyo,cid,7,0               ! No Prediction
rmod,tid,3,10.	! FKN
rmod,tid,5,0.	! ICONT
rmod,tid,6,0.	! PINB
rmod,tid,10,0.	! CNOF
rmod,tid,12,0.	! FKT
rmod,cid,3,10.	! FKN
rmod,cid,5,0.	! ICONT
rmod,cid,6,0.	! PINB
rmod,cid,10,0.	! CNOF
rmod,cid,12,0.	! FKT
nsel,all
esel,all
/com,******* Constant Zero Displacement X *******
CMBLOCK,_DISPZEROUX,NODE,       60
(8i10)
      1048      1049      1050      1051      1052      1053      1054      1055
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cmsel,s,_DISPZEROUX
d,all,ux,0
nsel,all
/com,******* Constant Zero Displacement Z *******
CMBLOCK,_DISPZEROUZ,NODE,       60
(8i10)
      1048      1049      1050      1051      1052      1053      1054      1055
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cmsel,s,_DISPZEROUZ
d,all,uz,0
nsel,all
nsel,all
/com,*********** Define Force Using Surface Effect Elements ***********
local,12,0,0.,0.,0.,-0.,0.,0.
csys,0
et,5,154
eblock,10,,,22
(15i9)
     2475        5        5        5       12       46       74       50       50      460      480       50      457
     2476        5        5        5       12       45       48       75       75      447      469       75      452
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-1
esel,s,type,,5
keyop,5,2,1                ! Apply load in local coordinate system
keyop,5,7,1                ! Use original area so load is constant in large deformation
keyop,5,11,2               ! Use real and not project area
esel,all

*DIM,_loadvari38x,TABLE,2,1,1,TIME,
! Time values
_loadvari38x(1,0,1) = 0.
_loadvari38x(2,0,1) = 1.
! Load values
_loadvari38x(1,1,1) = 0.
_loadvari38x(2,1,1) = 0.


*DIM,_loadvari38y,TABLE,2,1,1,TIME,
! Time values
_loadvari38y(1,0,1) = 0.
_loadvari38y(2,0,1) = 1.
! Load values
_loadvari38y(1,1,1) = 0.
_loadvari38y(2,1,1) = 8.0182830863914e-004


*DIM,_loadvari38z,TABLE,2,1,1,TIME,
! Time values
_loadvari38z(1,0,1) = 0.
_loadvari38z(2,0,1) = 1.
! Load values
_loadvari38z(1,1,1) = 0.
_loadvari38z(2,1,1) = -8.0182830863914e-004

/com,*********** Create Displacement Tables and Functions ******

*DIM,_loadvari40xp,TABLE,2,1,1,TIME,
! Time values
_loadvari40xp(1,0,1) = 0.
_loadvari40xp(2,0,1) = 1.
! Load values
_loadvari40xp(1,1,1) = 0.
_loadvari40xp(2,1,1) = 0.


*DIM,_loadvari40xn,TABLE,2,1,1,TIME,
! Time values
_loadvari40xn(1,0,1) = 0.
_loadvari40xn(2,0,1) = 1.
! Load values
_loadvari40xn(1,1,1) = -0.
_loadvari40xn(2,1,1) = -0.


*DIM,_loadvari40yp,TABLE,2,1,1,TIME,
! Time values
_loadvari40yp(1,0,1) = 0.
_loadvari40yp(2,0,1) = 1.
! Load values
_loadvari40yp(1,1,1) = 0.
_loadvari40yp(2,1,1) = 10.


*DIM,_loadvari40yn,TABLE,2,1,1,TIME,
! Time values
_loadvari40yn(1,0,1) = 0.
_loadvari40yn(2,0,1) = 1.
! Load values
_loadvari40yn(1,1,1) = -0.
_loadvari40yn(2,1,1) = -10.


*DIM,_loadvari40zp,TABLE,2,1,1,TIME,
! Time values
_loadvari40zp(1,0,1) = 0.
_loadvari40zp(2,0,1) = 1.
! Load values
_loadvari40zp(1,1,1) = 0.
_loadvari40zp(2,1,1) = 0.


*DIM,_loadvari40zn,TABLE,2,1,1,TIME,
! Time values
_loadvari40zn(1,0,1) = 0.
_loadvari40zn(2,0,1) = 1.
! Load values
_loadvari40zn(1,1,1) = -0.
_loadvari40zn(2,1,1) = -0.

fini
/com,****************************************************************************
/com,*************************    SOLUTION       ********************************
/com,****************************************************************************
/solu
antype,0                   ! static analysis
neqit,1,force              ! Force 1 eq iteration since only nonlinearity is bonded/no sep contact
pred,off
eqsl,sparse,,,,,1
cntr,print,1               ! print out contact info and also make no initial contact an error
nldiag,cont,iter           ! print out contact info each equilibrium iteration
resc,linear,last           ! Turn on restart files due to future eigen analysis intent
/com,****************************************************
/com,******************* SOLVE FOR LS 1 ****************
esel,s,type,,5
nsle
sfe,all,1,pres,1,%_loadvari38x%
sfe,all,2,pres,1,%_loadvari38y%
sfe,all,3,pres,1,%_loadvari38z%
nsel,all
esel,all
/com,*** Set Displacements ***
CMBLOCK,_CM40UY_YP,NODE,       60
(8i10)
      1048      1049      1050      1051      1052      1053      1054      1055
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cmsel,s,_CM40UY_YP
d,all,uy,%_loadvari40yp%
nsel,all
nsub,1,1,1
time,1.
outres,erase
outres,all,none
outres,nsol,all
outres,rsol,all
outres,strs,all
outres,epel,all
outres,eppl,all
stabilize,off                   ! Stabilization turned OFF by user
! *********** WB SOLVE COMMAND ***********
! check interactive state
*get,ANSINTER_,active,,int
*if,ANSINTER_,ne,0,then
/eof
*endif
solve
/com *************** Write FE CONNECTORS *********
CEWRITE,file,ce,,INTE
/com,****************************************************
/com,*************** FINISHED SOLVE FOR LS 1 *************
*set,_DS_PROGRESS          ! turn off progress updates to avoid virus scanning bug
/post1
fini
